atom_style	atomic
units   	metal
dimension	3
boundary 	p p p
processors      * * 1

read_data       ./data.960.c12graphene.relaxed
mass		1 12.01  ##Carbon

### Optimized Tersoff for Carbon: Lindsay and Broido PRB 81, 205441 (2010)
pair_style      tersoff
pair_coeff      * * C.opt.tersoff C(O)

variable	T equal 300
variable        V equal vol

variable        Lx equal xhi-xlo
variable        Ly equal yhi-ylo
print           "Lx = ${Lx} A"
print           "Ly = ${Ly} A"

print           "Volume simulation box = $V A^(3)"
variable        Volume equal v_Lx*v_Ly*3.35
print           "Volume = Lx*Ly*3.35A = ${Volume} A^(3)"

velocity	all create $T 345352 mom yes rot yes dist gaussian
timestep  	0.001  # 0.001 picosecond = 1 femtosecond
thermo          1000
thermo_style    custom step temp pe etotal press pxx pyy pzz

# ------------ Print structure -----------------------
dump            snapxyz all atom 100000 graphene.lammpstraj

# --------------- Equilibration in NVE -----------------
fix		1  all driver graphene 31415 unix
run		5000000
write_restart   restart.*
